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/batch
! ANSYS input file written by Workbench version 2019 R3
! File used for geometry attach: D:\Lavrova\PCSS\2021_12_06_Cat_12\Frame_PCSS_files\dp0\global\MECH\SYS-31\AssembledModel\SYS-31.pmdb
/title,Frame_PCSS--LC#1+0.4X +0.4Y -Z (F3)
/com,--- Data in consistent MKS units. See Solving Units in the help system for more information.
/units,MKS
/prep7
! Turn off shape checking because checks already performed inside WB mesher.
! See help system for more information.
SHPP,OFF,,NOWARN
etcon,set             ! allow ANSYS to choose best KEYOP's for 180x elements
/com,*********** Nodes for the whole assembly ***********
nblock,3,,522771
(1i9,3e20.9e3)
        1     2.183385000E+01    -8.930000000E-01     8.650957238E-01
        2     2.208454404E+01    -8.930000000E-01     8.650957238E-01
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